# OpenSim document version 40500
AnalyzeTool Hamner_modified_scaled:
  model_file: ../very_weak_glutes.osim
  replace_force_set: false
  results_directory: ../probe_report
  output_precision: 8
  initial_time: 0
  final_time: 1.100782
  solve_for_equilibrium_for_auxiliary_states: false
  maximum_number_of_integrator_steps: 20000
  maximum_integrator_step_size: 1
  minimum_integrator_step_size: 1e-8
  integrator_error_tolerance: 1e-5
  lowpass_cutoff_frequency_for_coordinates: -1
  AnalysisSet Analyses:
    PointKinematics: start_time=0 end_time=1.100782 step_interval=1 in_degrees=true body_name=ground
        relative_to_body_name=none point_name=NONAME point=(0 0 0)
